*Heading
** Job name: Job-1 Model name: Model-1
** Generated by: Abaqus/CAE 2024
*Preprint, echo=NO, model=NO, history=NO, contact=NO
**
** PARTS
**
*Part, name=Analise-1
*Node
      1,  0.125409499,   -3166.6001
      2,  0.108445004,   -3166.6001
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*Element, type=CAX4
 1,  1,  2, 21, 40
 2, 40, 21, 22, 39
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*Node
    205,           0.,       -2500.,           0.
*Nset, nset=Analise-1-RefPt_, internal
205,
*Nset, nset=ALL, generate
   1,  204,    1
*Elset, elset=ALL, generate
   1,  165,    1
*Nset, nset=ALLROCK
   9,  10,  11,  12,  13,  14
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*Elset, elset=ALLROCK
  23,  24,  25,  26,  27,  28
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*Nset, nset=FASEI
   1,   2,   3,   4,   5,   6
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*Elset, elset=FASEI
   1,   2,   3,   4,   5,   6
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*Nset, nset=FASEI_ANNULAR
   1,   4,   6,   7,  13,  14
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*Elset, elset=FASEI_ANNULAR
  45,  46,  47,  48,  49,  50
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*Nset, nset=FASEI_ANNULAR_BASE
  4, 13
*Elset, elset=FASEI_ANNULAR_BASE
 55,
*Nset, nset=FASEI_ANNULAR_ID
   1,   4,   6,   7,  31,  32
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*Elset, elset=FASEI_ANNULAR_ID
   1,   2,   3,   4,   5,   6
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*Elset, elset=FASEI_FLUIDO
  45,  46,  47,  48,  49,  50
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*Nset, nset=FASEI_REV
   1,   2,   3,   4,   5,   6
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*Elset, elset=FASEI_REV
  1,  2,  3,  4,  5,  6
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*Nset, nset=FASEI_SLAVE
   9,  10,  13,  14,  15,  18
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*Nset, nset=FASEI_WELL_CIMENTO_BASE
  13,  14,  19,  20,  83,  84
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*Elset, elset=FASEI_WELL_CIMENTO_BASE
  45,  46,  47,  48,  49,  50
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*Nset, nset=L1-I
  15,  16,  17,  18,  19,  20
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*Elset, elset=L1-I
  67,  68,  69,  70,  71,  72
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*Nset, nset=L2-I
   9,  12,  14,  15,  16,  19
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*Elset, elset=L2-I
 100, 101, 102, 103, 104, 105
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*Nset, nset=L3-I
   9,  10,  11,  12,  13,  14
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*Elset, elset=L3-I
  23,  24,  25,  26,  27,  28
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*Nset, nset=ROCK_BC
  11,  12,  16,  17,  72,  73
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*Elset, elset=ROCK_BC
  34,  35,  36,  37,  38,  39
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*Nset, nset=ROCK_OUTPUT
   9,  10,  13,  14,  15,  18
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*Elset, elset=ROCK_OUTPUT
 122, 123, 124, 125, 126, 127
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*Nset, nset=YSYM_BASE
  3,  4, 10, 11, 13, 71
*Elset, elset=YSYM_BASE
  11,  33,  44,  55, 132
*Nset, nset=YSYM_TOP
   7,   8,  17,  18,  20, 124
*Elset, elset=YSYM_TOP
  22,  87,  88,  89, 144
*Elset, elset=_FASEI_ANNULAR_S4, internal
  1,  2,  3,  4,  5,  6,  7,  8,  9, 10, 11, 89
*Elset, elset=_FASEI_ANNULAR_S2, internal
  12,  13,  14,  15,  16,  17
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*Elset, elset=_FASEI_ANNULAR_S1, internal
 122, 123, 124, 125, 126, 127
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*Surface, type=ELEMENT, name=FASEI_ANNULAR
_FASEI_ANNULAR_S4, S4
_FASEI_ANNULAR_S2, S2
_FASEI_ANNULAR_S1, S1
*Elset, elset=_FASEI_COMPLETED_WELL_S2, internal, generate
  1,  11,   1
*Elset, elset=_FASEI_COMPLETED_WELL_S4, internal
 12, 13, 14, 15, 16, 17
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*Surface, type=ELEMENT, name=FASEI_COMPLETED_WELL
_FASEI_COMPLETED_WELL_S2, S2
_FASEI_COMPLETED_WELL_S4, S4
*Elset, elset=_FASEI_FLUIDO_S4, internal, generate
  1,  11,   1
*Elset, elset=_FASEI_FLUIDO_S2, internal
  12,  13,  14,  15,  16,  17
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*Elset, elset=_FASEI_FLUIDO_S1, internal
 122, 123, 124, 125, 126, 127
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*Surface, type=ELEMENT, name=FASEI_FLUIDO
_FASEI_FLUIDO_S4, S4
_FASEI_FLUIDO_S2, S2
_FASEI_FLUIDO_S1, S1
*Elset, elset=_FASEI_MASTER_S4, internal, generate
  1,  11,   1
*Elset, elset=_FASEI_MASTER_S2, internal
 12, 13, 14, 15, 16, 17
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*Surface, type=ELEMENT, name=FASEI_MASTER
_FASEI_MASTER_S4, S4
_FASEI_MASTER_S2, S2
*Elset, elset=_FASEI_OPEN_WELL_S1, internal
 122, 123, 124, 125, 126, 127
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*Elset, elset=_FASEI_OPEN_WELL_S2, internal, generate
 155,  165,    1
*Surface, type=ELEMENT, name=FASEI_OPEN_WELL
_FASEI_OPEN_WELL_S1, S1
_FASEI_OPEN_WELL_S2, S2
*Elset, elset=_FASEI_REV_S2, internal
  1,  2,  3,  4,  5,  6
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*Elset, elset=_FASEI_REV_S3, internal
 11, 22
*Elset, elset=_FASEI_REV_S4, internal
  1,  2,  3,  4,  5,  6
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*Surface, type=ELEMENT, name=FASEI_REV
_FASEI_REV_S2, S2
_FASEI_REV_S3, S3
_FASEI_REV_S4, S4
*Elset, elset=_FASEI_WELL_S1, internal
 122, 123, 124, 125, 126, 127
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*Elset, elset=_FASEI_WELL_S2, internal, generate
 155,  165,    1
*Surface, type=ELEMENT, name=FASEI_WELL
_FASEI_WELL_S1, S1
_FASEI_WELL_S2, S2
** Section: VM11013CRSS
*Solid Section, elset=FASEI_REV, material=VM11013CRSS
,
** Section: L3-I-HALITA
*Solid Section, elset=L3-I, material=L3-I-HALITA
,
** Section: FLUIDO
*Solid Section, elset=FASEI_FLUIDO, material=FLUIDO
,
** Section: L1-I-FOLHELHO
*Solid Section, elset=L1-I, material=L1-I-FOLHELHO
,
** Section: L2-I-ARENITO
*Solid Section, elset=L2-I, material=L2-I-ARENITO
,
*End Part
**
**
** ASSEMBLY
**
*Assembly, name=Assembly
**
*Instance, name=Analise-1-1, part=Analise-1
*End Instance
**
*Surface, type=NODE, name=Analise-1-1_FASEI_SLAVE_CNS_, internal
Analise-1-1.FASEI_SLAVE, 1.
*End Assembly
**
** MATERIALS
**
*Material, name=FLUIDO
*Conductivity
 0.702,
*Density
1.,
*Elastic
10000.,0.
*Specific Heat
2060.,
*Material, name=L1-I-FOLHELHO
*Conductivity
 1.592,
*Density
 2332.74,
*Elastic
 2.00017e+10, 0.29
*Specific Heat
 0.209946,
*Mohr Coulomb
28.,7.
*Mohr Coulomb Hardening
 2.00017e+07,0.
*Material, name=L2-I-ARENITO
*Conductivity
 1.869,
*Density
 1780.09,
*Elastic
 2.4062e+10, 0.25
*Specific Heat
 0.209946,
*Mohr Coulomb
30., 7.5
*Mohr Coulomb Hardening
 2.00017e+07,0.
*Material, name=L3-I-HALITA
*Conductivity
 5.55,
*Creep
 1.01924e-41,  3., 0.7, 9.5
*Density
 1780.09,
*Elastic
 2.04e+10, 0.36
*Specific Heat
 0.209946,
*Material, name=VM11013CRSS
*Conductivity
 45.3452,
*Density
7950.,
*Elastic
 2.06843e+11, 0.3
*Plastic
 7.58424e+08,     0., 273.15
 7.58424e+08,   0.25, 273.15
 7.56376e+08,     0., 298.15
 7.56376e+08,   0.25, 298.15
  7.2566e+08,     0., 373.15
  7.2566e+08,   0.25, 373.15
 7.05182e+08,     0., 423.15
 7.05182e+08,   0.25, 423.15
 6.84705e+08,     0., 473.15
 6.84705e+08,   0.25, 473.15
 6.64227e+08,     0., 523.15
 6.64227e+08,   0.25, 523.15
*Specific Heat
 342.219,
**
** INTERACTION PROPERTIES
**
*Surface Interaction, name=C_FASEI
1.,
*Friction, slip tolerance=0.005
 0.5,
*Surface Behavior, pressure-overclosure=HARD
*Time Points, name=timePoint
1., 3600., 7200., 14400., 28800., 57600., 86400., 172800.
345600., 691200., 1.3824e+06, 2.7648e+06, 5.5296e+06, 1.10592e+07, 2.21184e+07, 3.1536e+07
6.3072e+07, 1.26144e+08, 2.52288e+08, 5.04576e+08, 9.4608e+08
**
** BOUNDARY CONDITIONS
**
** Name: FIX_FASEI_WELL Type: Symmetry/Antisymmetry/Encastre
*Boundary
Analise-1-1.FASEI_WELL_CIMENTO_BASE, XSYMM
** Name: PIN_FASEI Type: Symmetry/Antisymmetry/Encastre
*Boundary
Analise-1-1.FASEI_REV, PINNED
** Name: XSYM_ROCK_BC Type: Symmetry/Antisymmetry/Encastre
*Boundary
Analise-1-1.ROCK_BC, XSYMM
** Name: YSYM_BASE Type: Symmetry/Antisymmetry/Encastre
*Boundary
Analise-1-1.YSYM_BASE, YSYMM
** Name: YSYM_TOP Type: Symmetry/Antisymmetry/Encastre
*Boundary
Analise-1-1.YSYM_TOP, YSYMM
**
** PREDEFINED FIELDS
**
** Name: S_FASEI_REV   Type: Geostatic stress
*Initial Conditions, type=STRESS, GEOSTATIC
Analise-1-1.FASEI_REV, 1.33997e+08, -2000., -2.19818e+07, -4000., 0., 0.
** Name: S_L1-I   Type: Geostatic stress
*Initial Conditions, type=STRESS, GEOSTATIC
Analise-1-1.L1-I, -3.14128e+07, -2500., -4.05664e+07, -2900., 1., 1.
** Name: S_L2-I   Type: Geostatic stress
*Initial Conditions, type=STRESS, GEOSTATIC
Analise-1-1.L2-I, -4.05664e+07, -2900., -4.58052e+07, -3200., 1., 1.
** Name: S_L3-I   Type: Geostatic stress
*Initial Conditions, type=STRESS, GEOSTATIC
Analise-1-1.L3-I, -4.58052e+07, -3200., -5.1044e+07, -3500., 1., 1.
**
** INTERACTIONS
**
** Interaction: C_FASEI
*Contact Pair, interaction=C_FASEI, type=SURFACE TO SURFACE
Analise-1-1_FASEI_SLAVE_CNS_, Analise-1-1.FASEI_MASTER
** ----------------------------------------------------------------
**
** STEP: Geostatic
**
*Step, name=Geostatic, nlgeom=YES
*Geostatic
**
** LOADS
**
** Name: GRAVITY   Type: Gravity
*Dload, op=NEW
, GRAV, 9.81, , -1.
**
** INTERACTIONS
**
** Interaction: C_FASEI
*Model Change, type=CONTACT PAIR, remove
Analise-1-1_FASEI_SLAVE_CNS_, Analise-1-1.FASEI_MASTER
** Interaction: MC_FASEI_FLUIDO
*Model Change, remove
Analise-1-1.FASEI_FLUIDO,
** Interaction: MC_FASEI_REV
*Model Change, remove
Analise-1-1.FASEI_REV,
**
** OUTPUT REQUESTS
**
*Restart, write, frequency=0
**
** FIELD OUTPUT: FASEI_REV
**
*Output, field
*Node Output, nset=Analise-1-1.FASEI_REV
NT, U
*Element Output, elset=Analise-1-1.FASEI_REV, directions=YES
E, MISES, PE, S, PEEQ
**
** FIELD OUTPUT: ROCK_OUTPUT
**
*Node Output, nset=Analise-1-1.ROCK_OUTPUT
U,
*Element Output, elset=Analise-1-1.ROCK_OUTPUT, directions=YES
TEMP,
*Output, history, frequency=0
*End Step
** ----------------------------------------------------------------
**
** STEP: Transition
**
*Step, name=Transition, nlgeom=YES
*Static
1., 2., 2e-05, 2.
**
** LOADS
**
** Name: GRAVITY   Type: Gravity
*Dload, op=NEW
, GRAV, 9.81, , -1.
**
** OUTPUT REQUESTS
**
*Restart, write, frequency=0
**
** FIELD OUTPUT: FASEI_REV
**
*Output, field, time points=timePoint
*Node Output, nset=Analise-1-1.FASEI_REV
NT, U
*Element Output, elset=Analise-1-1.FASEI_REV, directions=YES
E, MISES, PE, S, PEEQ
**
** FIELD OUTPUT: ROCK_OUTPUT
**
*Node Output, nset=Analise-1-1.ROCK_OUTPUT
U,
*Element Output, elset=Analise-1-1.ROCK_OUTPUT, directions=YES
TEMP,
*Output, history, frequency=0
*End Step
** ----------------------------------------------------------------
**
** STEP: TempDefine
**
*Step, name=TempDefine, nlgeom=YES
*Static
1., 3., 3e-05, 3.
**
** LOADS
**
** Name: GRAVITY   Type: Gravity
*Dload, op=NEW
, GRAV, 9.81, , -1.
**
** PREDEFINED FIELDS
**
** Name: NT_FASEI   Type: Temperature Using Field: Geotermico
*Temperature
Analise-1-1.1, 318.578
Analise-1-1.2, 318.578
Analise-1-1.3, 330.285
Analise-1-1.4, 330.285
Analise-1-1.5, 306.694
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Analise-1-1.174, 307.759
** Name: NT_FASEI_ID   Type: Temperature Using Field: Geotermico
*Temperature
Analise-1-1.2, 318.578
Analise-1-1.3, 330.285
Analise-1-1.5, 306.694
Analise-1-1.8, 294.987
Analise-1-1.21, 319.643
Analise-1-1.22, 320.707
Analise-1-1.23, 321.771
Analise-1-1.24, 322.835
Analise-1-1.25, 323.9
Analise-1-1.26, 324.964
Analise-1-1.27, 326.117
Analise-1-1.28, 327.181
Analise-1-1.29, 328.245
Analise-1-1.30, 329.31
Analise-1-1.51, 295.963
Analise-1-1.52, 297.027
Analise-1-1.53, 298.092
Analise-1-1.54, 299.156
Analise-1-1.55, 300.309
Analise-1-1.56, 301.373
Analise-1-1.57, 302.437
Analise-1-1.58, 303.501
Analise-1-1.59, 304.566
Analise-1-1.60, 305.63
Analise-1-1.103, 307.759
Analise-1-1.104, 308.911
Analise-1-1.105, 309.976
Analise-1-1.106, 311.04
Analise-1-1.107, 312.104
Analise-1-1.108, 313.168
Analise-1-1.109, 314.233
Analise-1-1.110, 315.297
Analise-1-1.111, 316.361
Analise-1-1.112, 317.514
** Name: NT_L1-I   Type: Temperature Using Field: NT_L1-I
*Temperature
Analise-1-1.15, 306.732
Analise-1-1.16, 306.732
Analise-1-1.17, 294.9
Analise-1-1.18, 294.9
Analise-1-1.19, 306.732
Analise-1-1.20, 294.9
Analise-1-1.113, 306.732
Analise-1-1.114, 305.657
Analise-1-1.115, 304.581
Analise-1-1.116, 303.505
Analise-1-1.117, 302.43
Analise-1-1.118, 301.354
Analise-1-1.119, 300.278
Analise-1-1.120, 299.203
Analise-1-1.121, 298.127
Analise-1-1.122, 297.051
Analise-1-1.123, 295.976
Analise-1-1.124, 294.9
Analise-1-1.125, 295.976
Analise-1-1.126, 297.051
Analise-1-1.127, 298.127
Analise-1-1.128, 299.203
Analise-1-1.129, 300.278
Analise-1-1.130, 301.354
Analise-1-1.131, 302.43
Analise-1-1.132, 303.505
Analise-1-1.133, 304.581
Analise-1-1.134, 305.657
Analise-1-1.135, 305.657
Analise-1-1.136, 304.581
Analise-1-1.137, 303.505
Analise-1-1.138, 302.43
Analise-1-1.139, 301.354
Analise-1-1.140, 300.278
Analise-1-1.141, 299.203
Analise-1-1.142, 298.127
Analise-1-1.143, 297.051
Analise-1-1.144, 295.976
Analise-1-1.185, 305.657
Analise-1-1.186, 304.581
Analise-1-1.187, 303.505
Analise-1-1.188, 302.43
Analise-1-1.189, 301.354
Analise-1-1.190, 300.278
Analise-1-1.191, 299.203
Analise-1-1.192, 298.127
Analise-1-1.193, 297.051
Analise-1-1.194, 295.976
** Name: NT_L1-I_OD   Type: Temperature Using Field: NT_L1-I
*Temperature
Analise-1-1.16, 306.732
Analise-1-1.17, 294.9
Analise-1-1.114, 305.657
Analise-1-1.115, 304.581
Analise-1-1.116, 303.505
Analise-1-1.117, 302.43
Analise-1-1.118, 301.354
Analise-1-1.119, 300.278
Analise-1-1.120, 299.203
Analise-1-1.121, 298.127
Analise-1-1.122, 297.051
Analise-1-1.123, 295.976
** Name: NT_L2-I   Type: Temperature Using Field: NT_L2-I
*Temperature
Analise-1-1.9, 318.564
Analise-1-1.12, 318.564
Analise-1-1.14, 318.564
Analise-1-1.15, 306.732
Analise-1-1.16, 306.732
Analise-1-1.19, 306.732
Analise-1-1.82, 318.564
Analise-1-1.113, 306.732
Analise-1-1.145, 317.489
Analise-1-1.146, 316.413
Analise-1-1.147, 315.337
Analise-1-1.148, 314.262
Analise-1-1.149, 313.186
Analise-1-1.150, 312.11
Analise-1-1.151, 311.035
Analise-1-1.152, 309.959
Analise-1-1.153, 308.883
Analise-1-1.154, 307.808
Analise-1-1.155, 307.808
Analise-1-1.156, 308.883
Analise-1-1.157, 309.959
Analise-1-1.158, 311.035
Analise-1-1.159, 312.11
Analise-1-1.160, 313.186
Analise-1-1.161, 314.262
Analise-1-1.162, 315.337
Analise-1-1.163, 316.413
Analise-1-1.164, 317.489
Analise-1-1.165, 317.489
Analise-1-1.166, 316.413
Analise-1-1.167, 315.337
Analise-1-1.168, 314.262
Analise-1-1.169, 313.186
Analise-1-1.170, 312.11
Analise-1-1.171, 311.035
Analise-1-1.172, 309.959
Analise-1-1.173, 308.883
Analise-1-1.174, 307.808
Analise-1-1.195, 317.489
Analise-1-1.196, 316.413
Analise-1-1.197, 315.337
Analise-1-1.198, 314.262
Analise-1-1.199, 313.186
Analise-1-1.200, 312.11
Analise-1-1.201, 311.035
Analise-1-1.202, 309.959
Analise-1-1.203, 308.883
Analise-1-1.204, 307.808
** Name: NT_L2-I_OD   Type: Temperature Using Field: NT_L2-I
*Temperature
Analise-1-1.12, 318.564
Analise-1-1.16, 306.732
Analise-1-1.145, 317.489
Analise-1-1.146, 316.413
Analise-1-1.147, 315.337
Analise-1-1.148, 314.262
Analise-1-1.149, 313.186
Analise-1-1.150, 312.11
Analise-1-1.151, 311.035
Analise-1-1.152, 309.959
Analise-1-1.153, 308.883
Analise-1-1.154, 307.808
** Name: NT_L3-I   Type: Temperature Using Field: NT_L3-I
*Temperature
Analise-1-1.9, 318.564
Analise-1-1.10, 330.4
Analise-1-1.11, 330.4
Analise-1-1.12, 318.564
Analise-1-1.13, 330.4
Analise-1-1.14, 318.564
Analise-1-1.61, 319.64
Analise-1-1.62, 320.716
Analise-1-1.63, 321.792
Analise-1-1.64, 322.868
Analise-1-1.65, 323.944
Analise-1-1.66, 325.02
Analise-1-1.67, 326.096
Analise-1-1.68, 327.172
Analise-1-1.69, 328.248
Analise-1-1.70, 329.324
Analise-1-1.71, 330.4
Analise-1-1.72, 329.324
Analise-1-1.73, 328.248
Analise-1-1.74, 327.172
Analise-1-1.75, 326.096
Analise-1-1.76, 325.02
Analise-1-1.77, 323.944
Analise-1-1.78, 322.868
Analise-1-1.79, 321.792
Analise-1-1.80, 320.716
Analise-1-1.81, 319.64
Analise-1-1.82, 318.564
Analise-1-1.83, 329.324
Analise-1-1.84, 328.248
Analise-1-1.85, 327.172
Analise-1-1.86, 326.096
Analise-1-1.87, 325.02
Analise-1-1.88, 323.944
Analise-1-1.89, 322.868
Analise-1-1.90, 321.792
Analise-1-1.91, 320.716
Analise-1-1.92, 319.64
Analise-1-1.175, 319.64
Analise-1-1.176, 320.716
Analise-1-1.177, 321.792
Analise-1-1.178, 322.868
Analise-1-1.179, 323.944
Analise-1-1.180, 325.02
Analise-1-1.181, 326.096
Analise-1-1.182, 327.172
Analise-1-1.183, 328.248
Analise-1-1.184, 329.324
** Name: NT_L3-I_OD   Type: Temperature Using Field: NT_L3-I
*Temperature
Analise-1-1.11, 330.4
Analise-1-1.12, 318.564
Analise-1-1.72, 329.324
Analise-1-1.73, 328.248
Analise-1-1.74, 327.172
Analise-1-1.75, 326.096
Analise-1-1.76, 325.02
Analise-1-1.77, 323.944
Analise-1-1.78, 322.868
Analise-1-1.79, 321.792
Analise-1-1.80, 320.716
Analise-1-1.81, 319.64
**
** OUTPUT REQUESTS
**
*Restart, write, frequency=0
**
** FIELD OUTPUT: FASEI_REV
**
*Output, field, time points=timePoint
*Node Output, nset=Analise-1-1.FASEI_REV
NT, U
*Element Output, elset=Analise-1-1.FASEI_REV, directions=YES
E, MISES, PE, S, PEEQ
**
** FIELD OUTPUT: ROCK_OUTPUT
**
*Node Output, nset=Analise-1-1.ROCK_OUTPUT
U,
*Element Output, elset=Analise-1-1.ROCK_OUTPUT, directions=YES
TEMP,
*Output, history, frequency=0
*End Step
** ----------------------------------------------------------------
**
** STEP: Perf_10_375
**
*Step, name=Perf_10_375, nlgeom=YES
*Static
1., 1., 1e-05, 1.
**
** BOUNDARY CONDITIONS
**
** Name: FIX_FASEI_WELL Type: Symmetry/Antisymmetry/Encastre
*Boundary, op=NEW
** Name: PIN_FASEI Type: Symmetry/Antisymmetry/Encastre
*Boundary, op=NEW
Analise-1-1.FASEI_REV, PINNED
** Name: XSYM_ROCK_BC Type: Symmetry/Antisymmetry/Encastre
*Boundary, op=NEW
Analise-1-1.ROCK_BC, XSYMM
** Name: YSYM_BASE Type: Symmetry/Antisymmetry/Encastre
*Boundary, op=NEW
Analise-1-1.YSYM_BASE, YSYMM
** Name: YSYM_TOP Type: Symmetry/Antisymmetry/Encastre
*Boundary, op=NEW
Analise-1-1.YSYM_TOP, YSYMM
**
** LOADS
**
** Name: GRAVITY   Type: Gravity
*Dload, op=NEW
, GRAV, 9.81, , -1.
** Name: P_FASEI_OPEN_WELL   Type: Pressure Using Field: P_FASEI_OPEN_WELL
*Dload, op=NEW
Analise-1-1.122, P1, 3.17913e+07
Analise-1-1.123, P1, 3.20941e+07
Analise-1-1.124, P1, 3.2397e+07
Analise-1-1.125, P1, 3.26998e+07
Analise-1-1.126, P1, 3.30027e+07
Analise-1-1.127, P1, 3.33055e+07
Analise-1-1.128, P1, 3.36083e+07
Analise-1-1.129, P1, 3.39112e+07
Analise-1-1.130, P1, 3.4214e+07
Analise-1-1.131, P1, 3.45169e+07
Analise-1-1.132, P1, 3.48197e+07
Analise-1-1.144, P1, 2.51308e+07
Analise-1-1.145, P1, 2.54335e+07
Analise-1-1.146, P1, 2.57363e+07
Analise-1-1.147, P1, 2.6039e+07
Analise-1-1.148, P1, 2.63417e+07
Analise-1-1.149, P1, 2.66445e+07
Analise-1-1.150, P1, 2.69473e+07
Analise-1-1.151, P1, 2.725e+07
Analise-1-1.152, P1, 2.75527e+07
Analise-1-1.153, P1, 2.78555e+07
Analise-1-1.154, P1, 2.81583e+07
Analise-1-1.155, P2, 2.8461e+07
Analise-1-1.156, P2, 2.87638e+07
Analise-1-1.157, P2, 2.90665e+07
Analise-1-1.158, P2, 2.93693e+07
Analise-1-1.159, P2, 2.9672e+07
Analise-1-1.160, P2, 2.99748e+07
Analise-1-1.161, P2, 3.02775e+07
Analise-1-1.162, P2, 3.05802e+07
Analise-1-1.163, P2, 3.0883e+07
Analise-1-1.164, P2, 3.11858e+07
Analise-1-1.165, P2, 3.14885e+07
**
** OUTPUT REQUESTS
**
*Restart, write, frequency=0
**
** FIELD OUTPUT: FASEI_REV
**
*Output, field, time points=timePoint
*Node Output, nset=Analise-1-1.FASEI_REV
NT, U
*Element Output, elset=Analise-1-1.FASEI_REV, directions=YES
E, MISES, PE, S, PEEQ
**
** FIELD OUTPUT: ROCK_OUTPUT
**
*Node Output, nset=Analise-1-1.ROCK_OUTPUT
U,
*Element Output, elset=Analise-1-1.ROCK_OUTPUT, directions=YES
TEMP,
*Output, history, frequency=0
*End Step
** ----------------------------------------------------------------
**
** STEP: Perf_10_375_Creep
**
*Step, name=Perf_10_375_Creep, nlgeom=YES, inc=1000000
*Visco, cetol=0.01
1., 172800., 1e-15, 172800.
**
** LOADS
**
** Name: GRAVITY   Type: Gravity
*Dload, op=NEW
, GRAV, 9.81, , -1.
** Name: P_FASEI_OPEN_WELL   Type: Pressure Using Field: P_FASEI_OPEN_WELL
*Dload, op=NEW
Analise-1-1.122, P1, 3.17913e+07
Analise-1-1.123, P1, 3.20941e+07
Analise-1-1.124, P1, 3.2397e+07
Analise-1-1.125, P1, 3.26998e+07
Analise-1-1.126, P1, 3.30027e+07
Analise-1-1.127, P1, 3.33055e+07
Analise-1-1.128, P1, 3.36083e+07
Analise-1-1.129, P1, 3.39112e+07
Analise-1-1.130, P1, 3.4214e+07
Analise-1-1.131, P1, 3.45169e+07
Analise-1-1.132, P1, 3.48197e+07
Analise-1-1.144, P1, 2.51308e+07
Analise-1-1.145, P1, 2.54335e+07
Analise-1-1.146, P1, 2.57363e+07
Analise-1-1.147, P1, 2.6039e+07
Analise-1-1.148, P1, 2.63417e+07
Analise-1-1.149, P1, 2.66445e+07
Analise-1-1.150, P1, 2.69473e+07
Analise-1-1.151, P1, 2.725e+07
Analise-1-1.152, P1, 2.75527e+07
Analise-1-1.153, P1, 2.78555e+07
Analise-1-1.154, P1, 2.81583e+07
Analise-1-1.155, P2, 2.8461e+07
Analise-1-1.156, P2, 2.87638e+07
Analise-1-1.157, P2, 2.90665e+07
Analise-1-1.158, P2, 2.93693e+07
Analise-1-1.159, P2, 2.9672e+07
Analise-1-1.160, P2, 2.99748e+07
Analise-1-1.161, P2, 3.02775e+07
Analise-1-1.162, P2, 3.05802e+07
Analise-1-1.163, P2, 3.0883e+07
Analise-1-1.164, P2, 3.11858e+07
Analise-1-1.165, P2, 3.14885e+07
**
** OUTPUT REQUESTS
**
*Restart, write, frequency=0
**
** FIELD OUTPUT: FASEI_REV
**
*Output, field, time points=timePoint
*Node Output, nset=Analise-1-1.FASEI_REV
NT, U
*Element Output, elset=Analise-1-1.FASEI_REV, directions=YES
E, MISES, PE, S, PEEQ
**
** FIELD OUTPUT: ROCK_OUTPUT
**
*Node Output, nset=Analise-1-1.ROCK_OUTPUT
U,
*Element Output, elset=Analise-1-1.ROCK_OUTPUT, directions=YES
TEMP,
*Output, history, frequency=0
*End Step
** ----------------------------------------------------------------
**
** STEP: Rev_9_875
**
*Step, name=Rev_9_875, nlgeom=YES
*Static
1., 1., 1e-15, 1.
**
** BOUNDARY CONDITIONS
**
** Name: PIN_FASEI Type: Symmetry/Antisymmetry/Encastre
*Boundary, op=NEW
** Name: XSYM_ROCK_BC Type: Symmetry/Antisymmetry/Encastre
*Boundary, op=NEW
Analise-1-1.ROCK_BC, XSYMM
** Name: YSYM_BASE Type: Symmetry/Antisymmetry/Encastre
*Boundary, op=NEW
Analise-1-1.YSYM_BASE, YSYMM
** Name: YSYM_TOP Type: Symmetry/Antisymmetry/Encastre
*Boundary, op=NEW
Analise-1-1.YSYM_TOP, YSYMM
**
** LOADS
**
** Name: GRAVITY   Type: Gravity
*Dload, op=NEW
, GRAV, 9.81, , -1.
** Name: P_FASEI_COMPLETED_WELL   Type: Pressure Using Field: P_FASEI_COMPLETED_WELL
*Dload, op=NEW
Analise-1-1.1, P2, 3.17913e+07
Analise-1-1.2, P2, 3.20941e+07
Analise-1-1.3, P2, 3.2397e+07
Analise-1-1.4, P2, 3.26998e+07
Analise-1-1.5, P2, 3.30027e+07
Analise-1-1.6, P2, 3.33055e+07
Analise-1-1.7, P2, 3.36083e+07
Analise-1-1.8, P2, 3.39112e+07
Analise-1-1.9, P2, 3.4214e+07
Analise-1-1.10, P2, 3.45169e+07
Analise-1-1.11, P2, 3.48197e+07
Analise-1-1.12, P4, 2.81583e+07
Analise-1-1.13, P4, 2.78555e+07
Analise-1-1.14, P4, 2.75527e+07
Analise-1-1.15, P4, 2.725e+07
Analise-1-1.16, P4, 2.69473e+07
Analise-1-1.17, P4, 2.66445e+07
Analise-1-1.18, P4, 2.63417e+07
Analise-1-1.19, P4, 2.6039e+07
Analise-1-1.20, P4, 2.57363e+07
Analise-1-1.21, P4, 2.54335e+07
Analise-1-1.22, P4, 2.51308e+07
Analise-1-1.56, P4, 3.14885e+07
Analise-1-1.57, P4, 3.11858e+07
Analise-1-1.58, P4, 3.0883e+07
Analise-1-1.59, P4, 3.05802e+07
Analise-1-1.60, P4, 3.02775e+07
Analise-1-1.61, P4, 2.99748e+07
Analise-1-1.62, P4, 2.9672e+07
Analise-1-1.63, P4, 2.93693e+07
Analise-1-1.64, P4, 2.90665e+07
Analise-1-1.65, P4, 2.87638e+07
Analise-1-1.66, P4, 2.8461e+07
** Name: P_FASEI_FLUIDO   Type: Pressure Using Field: P_FASEI_FLUIDO
*Dload, op=NEW
Analise-1-1.1, P4, 3.17913e+07
Analise-1-1.2, P4, 3.20941e+07
Analise-1-1.3, P4, 3.2397e+07
Analise-1-1.4, P4, 3.26998e+07
Analise-1-1.5, P4, 3.30027e+07
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Analise-1-1.165, P2, 3.14885e+07
** Name: P_FASEI_OPEN_WELL   Type: Pressure Using Field: P_FASEI_OPEN_WELL
*Dload, op=NEW
**
** INTERACTIONS
**
** Interaction: C_FASEI
*Model Change, type=CONTACT PAIR, add
Analise-1-1_FASEI_SLAVE_CNS_, Analise-1-1.FASEI_MASTER
** Interaction: MC_FASEI_REV
*Model Change, add
Analise-1-1.FASEI_REV,
**
** OUTPUT REQUESTS
**
*Restart, write, frequency=0
**
** FIELD OUTPUT: FASEI_REV
**
*Output, field, time points=timePoint
*Node Output, nset=Analise-1-1.FASEI_REV
NT, U
*Element Output, elset=Analise-1-1.FASEI_REV, directions=YES
E, MISES, PE, S, PEEQ
**
** FIELD OUTPUT: ROCK_OUTPUT
**
*Node Output, nset=Analise-1-1.ROCK_OUTPUT
U,
*Element Output, elset=Analise-1-1.ROCK_OUTPUT, directions=YES
TEMP,
*Output, history, frequency=0
*End Step
** ----------------------------------------------------------------
**
** STEP: Rev_9_875_Creep
**
*Step, name=Rev_9_875_Creep, nlgeom=YES, inc=1000000
*Visco, cetol=0.01
1., 9.45907e+08, 1e-15, 1.5552e+07
**
** LOADS
**
** Name: GRAVITY   Type: Gravity
*Dload, op=NEW
, GRAV, 9.81, , -1.
** Name: P_FASEI_COMPLETED_WELL   Type: Pressure Using Field: P_FASEI_COMPLETED_WELL
*Dload, op=NEW
Analise-1-1.1, P2, 3.17913e+07
Analise-1-1.2, P2, 3.20941e+07
Analise-1-1.3, P2, 3.2397e+07
Analise-1-1.4, P2, 3.26998e+07
Analise-1-1.5, P2, 3.30027e+07
Analise-1-1.6, P2, 3.33055e+07
Analise-1-1.7, P2, 3.36083e+07
Analise-1-1.8, P2, 3.39112e+07
Analise-1-1.9, P2, 3.4214e+07
Analise-1-1.10, P2, 3.45169e+07
Analise-1-1.11, P2, 3.48197e+07
Analise-1-1.12, P4, 2.81583e+07
Analise-1-1.13, P4, 2.78555e+07
Analise-1-1.14, P4, 2.75527e+07
Analise-1-1.15, P4, 2.725e+07
Analise-1-1.16, P4, 2.69473e+07
Analise-1-1.17, P4, 2.66445e+07
Analise-1-1.18, P4, 2.63417e+07
Analise-1-1.19, P4, 2.6039e+07
Analise-1-1.20, P4, 2.57363e+07
Analise-1-1.21, P4, 2.54335e+07
Analise-1-1.22, P4, 2.51308e+07
Analise-1-1.56, P4, 3.14885e+07
Analise-1-1.57, P4, 3.11858e+07
Analise-1-1.58, P4, 3.0883e+07
Analise-1-1.59, P4, 3.05802e+07
Analise-1-1.60, P4, 3.02775e+07
Analise-1-1.61, P4, 2.99748e+07
Analise-1-1.62, P4, 2.9672e+07
Analise-1-1.63, P4, 2.93693e+07
Analise-1-1.64, P4, 2.90665e+07
Analise-1-1.65, P4, 2.87638e+07
Analise-1-1.66, P4, 2.8461e+07
** Name: P_FASEI_FLUIDO   Type: Pressure Using Field: P_FASEI_FLUIDO
*Dload, op=NEW
Analise-1-1.1, P4, 3.17913e+07
Analise-1-1.2, P4, 3.20941e+07
Analise-1-1.3, P4, 3.2397e+07
Analise-1-1.4, P4, 3.26998e+07
Analise-1-1.5, P4, 3.30027e+07
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Analise-1-1.165, P2, 3.14885e+07
**
** OUTPUT REQUESTS
**
*Restart, write, frequency=0
**
** FIELD OUTPUT: FASEI_REV
**
*Output, field, time points=timePoint
*Node Output, nset=Analise-1-1.FASEI_REV
NT, U
*Element Output, elset=Analise-1-1.FASEI_REV, directions=YES
E, MISES, PE, S, PEEQ
**
** FIELD OUTPUT: ROCK_OUTPUT
**
*Node Output, nset=Analise-1-1.ROCK_OUTPUT
U,
*Element Output, elset=Analise-1-1.ROCK_OUTPUT, directions=YES
TEMP,
*Output, history, frequency=0
*End Step
